// SBML level 2 version 1

model Pyruvate_cycle_Model()
  // The current model is the complete model of pyruvate cycling incorporating all the shuttles of pyruvate cycling in the glucose stimulated insulin secretion (GSIS). The scaling parameter of shuttle reactions Vr is removed while exporting to SBML, since the format is not supported in the SBML. So to replicate MATLAB Ordinary Differential Equations the Vr is modeled as stoichiometry.

  // Compartments:
  compartment cyto = 1;
  compartment mito in cyto = 1;

  // Species:
  species glc_c in cyto = 1.767786e-7;
  species F6P_c in cyto = 6.843052e-7;
  species FBP_c in cyto = 3.147551e-10;
  species GAP_c in cyto = 1.728624e-7;
  species DPG_c in cyto = 3.01738e-9;
  species PEP_c in cyto = 8.416359e-6;
  species LAC_c in cyto = 3.360687e-6;
  species PYR_c in cyto = 1.591161e-7;
  species MAL_c in cyto = 1.419734e-10;
  species CIT_c in cyto = 9.974953e-13;
  species ICIT_c in cyto = 9.423401e-13;
  species AKG_c in cyto = 7.721259e-10;
  species OAA_c in cyto = 7.457292e-15;
  species NADPH_c in cyto = 1.794159e-9;
  species PYR_m in mito = 5.599854e-8;
  species ACO_m in mito = 6.740203e-7;
  species CIT_m in mito = 3.1072e-9;
  species ICIT_m in mito = 5.306969e-15;
  species AKG_m in mito = 4.567351e-8;
  species SCOA_m in mito = 4.365999e-8;
  species SUC_m in mito = 6.525093e-10;
  species FUM_m in mito = 5.639839e-11;
  species MAL_m in mito = 5.597827e-11;
  species OAA_m in mito = 2.901529e-6;

  // Parameters:
  inglc = 0.003;
  Vr = 20;
  NADPtot = 0.0005;
  v0_1 = 2.7271e-6;
  v0_2 = 101.054;
  v1_1 = 0.00013424;
  v1_2 = 0.00030118;
  v1_3 = 1.34;
  v2_1 = 3.16667e-5;
  v2_2 = 0.0089;
  v2_3 = 0.9;
  v3_1 = 7.97833e-5;
  v3_2 = 4e-6;
  v4_1 = 0.001;
  v4_2 = 0.00032;
  v4_3 = 1.5;
  v5_1 = 3.33e-5;
  v5_2 = 8e-6;
  v6_1 = 5.33e-5;
  v6_2 = 0.00015;
  v6_3 = 2.9;
  v7_1 = 29.0969;
  v7_eq = 21.121;
  v7_2 = 448491;
  v7_3 = 449.094;
  v9_1 = 3.7674e-8;
  v9_2 = 0.004;
  v9_3 = 49.2637;
  v9_4 = 187.379;
  v10_1 = 32514;
  v10_2 = 84267;
  v10_3 = 0.00013;
  v10_4 = 0.00044;
  v10_5 = 0.00033;
  v10_6 = 4.18e-5;
  v12_1 = 5811.9;
  v12_2 = 6739.9;
  v12_3 = 0.0003;
  v12_4 = 0.0007;
  v12_5 = 0.0014;
  v12_6 = 0.00017;
  v13_1 = 0.8512;
  v13_2 = 0.2721;
  v13_3 = 1388.9;
  v13_4 = 1111.1;
  v14_1 = 1e-6;
  v14_2 = 1e-5;
  v15_1 = 0.8333;
  v15_2 = 0.00035714;
  v16_1 = 0.0036;
  v16_2 = 50000;
  v16_3 = 1111.1;
  v16_4 = 16667;
  v17_1 = 0.0158;
  v17_2 = 0.1104;
  v17_3 = 9090.9;
  v17_4 = 2000;
  v18_1 = 1152100;
  v18_2 = 5482500;
  v18_3 = 23041500000;
  v18_4 = 142857;
  v18_5 = 161290;
  v18_6 = 109649000000;
  v18_7 = 416667;
  v18_8 = 263158;
  v19_1 = 913070;
  v19_eq = 1000;
  v19_2 = 0.00012;
  v19_3 = 1.39e-6;
  v19_4 = 0.0048;
  v19_5 = 5.3e-6;
  v20_1 = 1.41667e-7;
  v20_2 = 3.5e-5;
  v20_3 = 2e-5;
  v21_1 = 1.7163e-7;
  v21_2 = 27;
  v21_3 = 1.2944e-5;
  v21_4 = 0.00018413;
  v21_5 = 2.22e-5;
  v21_6 = 1.1333e-6;
  v21_7 = 0.0926;
  v21_8 = 0.48787;
  v21_9 = 0.036228;
  v21_10 = 1.0444;
  v22_1 = 50.85;
  v22_2 = 25000000000;
  v22_3 = 295000;
  v22_4 = 120000;
  v23_1 = 0.0158;
  v23_2 = 0.1104;
  v23_3 = 9090.9;
  v23_4 = 2000;
  v24_1 = 0.11263;
  v24_2 = 82222;
  v24_3 = 2777.8;
  v24_4 = 0.63889;
  v24_5 = 0.21667;
  v24_6 = 1.7778;
  v25_1 = 0.0311;
  v25_2 = 1454600000;
  v25_3 = 1454600000;
  v25_4 = 24691;
  v26_1 = 3.2512e-5;
  v26_2 = 6.4;
  v26_3 = 4.1876;
  v26_4 = 37.5348;
  v26_5 = 1478.2;
  v26_6 = 9509.6;
  v26_7 = 236.711;
  v27_1 = 2.941;
  v27_2 = 11.5344;
  v27_3 = 449.661;
  v27_4 = 199130;
  v27_5 = 179210000;
  v28_1 = 13.9024;
  v28_2 = 13.9024;
  v28_3 = 4000000;
  v28_4 = 880000;
  v29_1 = 0.0016;
  v29_2 = 2.5563e-10;
  v29_3 = 33263;
  v29_4 = 14.0754;
  v29_5 = 2742900;
  v30_1 = 157.813;
  v30_eq = 1000;
  v30_2 = 500;
  v30_3 = 227.273;
  v15_3 = 8333.3;
  v15_4 = 5000;
  flow = 1.46e-90;
  sink = 8.89e-60;

  // Assignment rules:
  NADP_c := NADPtot - NADPH_c;
  atpeq := 0.44444*(inglc - 1e-3) + 3e-3;
  adpeq := -0.066667*(inglc - 1e-3) + 1.2e-3;
  ATP := piecewise(atpeq, inglc < 10e-3, 0.007);
  ADP := piecewise(adpeq, inglc < 10e-3, 0.0006);
  denomglc := 1 + (inglc + glc_c)*v0_2 + v0_2^2*inglc*glc_c;
  denomlac := 1 + v7_2*PYR_c + v7_3*LAC_c;
  denompyrs := 1 + v9_3*PYR_m + PYR_c*v9_4;
  denomcits := 1 + CIT_c/v10_3 + MAL_m/v10_4 + MAL_c/v10_5 + CIT_m/v10_6 + CIT_c*MAL_m/(v10_3*v10_4) + MAL_c*CIT_m/(v10_5*v10_6) + MAL_m*CIT_m/(v10_4*v10_6) + CIT_c*MAL_c/(v10_3*v10_5);
  denomicits := 1 + ICIT_c/v10_3 + MAL_m/v10_4 + MAL_c/v10_5 + ICIT_m/v10_6 + ICIT_c*MAL_m/(v10_3*v10_4) + MAL_c*ICIT_m/(v10_5*v10_6) + MAL_m*ICIT_m/(v10_4*v10_6) + ICIT_c*MAL_c/(v10_3*v10_5);
  denomakhs := 1 + AKG_m/v12_3 + MAL_c/v12_4 + MAL_m/v12_5 + AKG_c/v12_6 + AKG_m*MAL_c/(v12_3*v12_4) + MAL_m*AKG_c/(v12_5*v12_6) + MAL_c*AKG_c/(v12_4*v12_6) + AKG_m*MAL_m/(v12_3*v12_5);
  denommals := 1 + v13_3*MAL_m + MAL_c*v13_4;
  denomcitl := 1 + v15_3*CIT_c + v15_4*OAA_c;
  denommdhc := 1 + v16_3*MAL_c + v16_4*OAA_c;
  denomaconc := v17_3*ICIT_c + v17_4*CIT_c + 1;
  denomisodc1 := v18_3*ICIT_c*NADP_c + v18_4*NADP_c + v18_5*ICIT_c + 1;
  denomisodc2 := v18_6*AKG_c*NADPH_c + v18_7*NADPH_c + v18_8*AKG_c + 1;
  denommalicc := 1 + MAL_c/v19_2 + NADP_c/v19_3 + PYR_c/v19_4 + NADPH_c/v19_5 + MAL_c*NADP_c/(v19_2*v19_3) + PYR_c*NADPH_c/(v19_4*v19_5) + MAL_c*NADPH_c/(v19_2*v19_5) + PYR_c*NADP_c/(v19_4*v19_3);
  denompc := v21_3*PYR_m + v21_4*OAA_m + v21_5*ATP + v21_6*ADP + v21_7*ATP*PYR_m + v21_8*ATP*OAA_m + v21_9*ADP*PYR_m + v21_10*ADP*OAA_m;
  denomacm := v23_3*ICIT_m + v23_4*CIT_m + 1;
  denomscm := 1 + v26_4*SCOA_m + v26_5*SUC_m + v26_6*SUC_m*SUC_m + v26_7*SCOA_m*SUC_m;
  denomsdh := 1 + v27_3*SUC_m + v27_4*FUM_m + v27_5*SUC_m*FUM_m;
  denomfum := v28_3*MAL_m + v28_4*FUM_m + 1;
  denommdhm := 1 + MAL_m*v29_3 + v29_4*OAA_m + v29_5*MAL_m*OAA_m;
  denommalicm := 1 + v30_2*MAL_m + v30_3*PYR_m;

  // Reactions:
  J0entry_c: -> glc_c; v0_1*inglc/denomglc - v0_1*glc_c/denomglc;
  J1gk_c: glc_c => F6P_c; v1_1*glc_c^v1_3/(v1_2^v1_3 + glc_c^v1_3);
  J2pfk_c: F6P_c => FBP_c; v2_1*F6P_c^v2_3/(v2_2^v2_3 + F6P_c^v2_3);
  J3fba_c: FBP_c => 2 GAP_c; v3_1*FBP_c/(v3_2 + FBP_c);
  J4gapd_c: GAP_c => DPG_c; v4_1*GAP_c^v4_3/(v4_2^v4_3 + GAP_c^v4_3);
  J5pgp_c: DPG_c => PEP_c; v5_1*DPG_c/(v5_2 + DPG_c);
  J6pk_c: PEP_c => PYR_c; v6_1*PEP_c^v6_3/(v6_2^v6_3 + PEP_c^v6_3);
  J7ldh_c: PYR_c -> LAC_c; v7_1*PYR_c/denomlac - v7_1*LAC_c/(v7_eq*denomlac);
  J9pyr_s: PYR_m -> 20 PYR_c; v9_1*PYR_m/denompyrs - PYR_c*v9_2/denompyrs;
  J10cit_s: 20 CIT_c + MAL_m -> 20 MAL_c + CIT_m; CIT_c*MAL_m*v10_1/denomcits - MAL_c*CIT_m*v10_2/denomcits;
  J11icit_s: 20 ICIT_c + MAL_m -> 20 MAL_c + ICIT_m; ICIT_c*MAL_m*v10_1/denomicits - MAL_c*ICIT_m*v10_2/denomicits;
  J12akhmal_s: 20 MAL_c + AKG_m -> 20 AKG_c + MAL_m; AKG_m*MAL_c*v12_1/denomakhs - MAL_m*AKG_c*v12_2/denomakhs;
  J13malh_s: MAL_m -> 20 MAL_c; MAL_m*v13_1/denommals - MAL_c*v13_2/denommals;
  J14nadph_c: NADPH_c => ; v14_1*NADPH_c/(v14_2 + NADPH_c);
  J15citl_c: CIT_c -> OAA_c; v15_1*CIT_c/denomcitl - v15_2*OAA_c/denomcitl;
  J16mdh_c: MAL_c -> OAA_c; v16_1*MAL_c/denommdhc - OAA_c*v16_2/denommdhc;
  J17acon_c: CIT_c -> ICIT_c; v17_1*CIT_c/denomaconc - v17_2*ICIT_c/denomaconc;
  J18isod_c: ICIT_c -> AKG_c + NADPH_c; v18_1*ICIT_c*NADP_c/denomisodc1 - v18_2*AKG_c*NADPH_c/denomisodc2;
  J19me_c: MAL_c -> PYR_c + NADPH_c; v19_1*MAL_c*NADP_c/denommalicc - v19_1*PYR_c*NADPH_c/(v19_eq*denommalicc);
  J20pdh_m: PYR_m => ACO_m; v20_1*PYR_m/(v20_2*(1 + ACO_m/v20_3) + PYR_m);
  J21pc_m: OAA_m -> PYR_m; v21_1*ADP*OAA_m/denompc - v21_2*ATP*PYR_m/denompc;
  J22cs_m: ACO_m + OAA_m => CIT_m; v22_1*ACO_m*OAA_m/(v22_2*ACO_m*OAA_m + v22_3*OAA_m + v22_4*ACO_m + 1);
  J23ac_m: CIT_m -> ICIT_m; v23_1*CIT_m/denomacm - v23_2*ICIT_m/denomacm;
  J24icd_m: ICIT_m => AKG_m; v24_1*(ICIT_m*ICIT_m + v24_2*ICIT_m)/(v24_3*ICIT_m*ICIT_m + v24_4*ICIT_m + v24_5*ADP + v24_6*ADP*ICIT_m + 1);
  J25akg_m: AKG_m => SCOA_m; v25_1*AKG_m/(1 + v25_2*AKG_m + v25_3*SCOA_m + v25_4*AKG_m*SCOA_m);
  J26sco_m: SCOA_m -> SUC_m; v26_1*v26_3*SCOA_m/denomscm - v26_1*SUC_m*(v26_2*SUC_m + 1)/denomscm;
  J27sdh_m: SUC_m -> FUM_m; v27_1*SUC_m/denomsdh - FUM_m*v27_2/denomsdh;
  J28fum_m: FUM_m -> MAL_m; v28_1*FUM_m/denomfum - v28_2*MAL_m/denomfum;
  J29mdh_m: MAL_m -> OAA_m; v29_1*MAL_m/denommdhm - v29_2*OAA_m/denommdhm;
  J30me_m: MAL_m -> PYR_m; v30_1*MAL_m/denommalicm - v30_1*PYR_m/(v30_eq*denommalicm);
  akgflow: AKG_c => ; AKG_c*flow;
  lacsink: LAC_c => ; sink*LAC_c;
end
